// SBML level 3 version 1

model main()
  // model units - substance: mole, time: second

  // Compartments:
  compartment c1;

  // Species:
  species $A in c1 = 0;  // substance in nanmol
  species B in c1 = 0;  // substance in nanmol
  species A_B in c1 = 0;  // substance in nanmol
  species BpT in c1 = 0;  // substance in nanmol
  species C in c1 = 0;  // substance in nanmol
  species BpT_C in c1 = 0;  // substance in nanmol
  species CpS in c1 = 0;  // substance in nanmol
  species D in c1 = 0;  // substance in nanmol
  species D_BpT in c1 = 0;  // substance in nanmol
  species DpT_BpT in c1 = 0;  // substance in nanmol
  species DpT in c1 = 0;  // substance in nanmol
  species DpT_C in c1 = 0;  // substance in nanmol
  species E in c1 = 0;  // substance in nanmol
  species DpT_E in c1 = 0;  // substance in nanmol
  species DpS in c1 = 0;  // substance in nanmol
  species F in c1 = 0;  // substance in nanmol
  species DpS_F in c1 = 0;  // substance in nanmol
  species G in c1 = 0;  // substance in nanmol
  species DpT_G in c1 = 0;  // substance in nanmol
  species Gp in c1 = 0;  // substance in nanmol

  // Parameters:
  k1 = 0.06 per_nanmol_per_sec;
  k2 = 0.0033 per_sec;
  k3 = 41.66 per_sec;
  k4 = 0.0066 per_sec;
  k5 = 0.0015 per_nanmol_per_sec;
  k6 = 0.001 per_sec;
  k7 = 11.3 per_sec;
  k8 = 0.3962 per_sec;
  k9 = 0.1066 per_nanmol_per_sec;
  k10 = 0.3998 per_sec;
  k11 = 0.66 per_sec;
  k12 = 0.0066 per_nanmol_per_sec;
  k13 = 0.066 per_sec;
  k14 = 0.0015 per_nanmol_per_sec;
  k15 = 0.001 per_sec;
  k16 = 11.3 per_sec;
  k17 = 0.01 per_nanmol_per_sec;
  k18 = 0.01 per_sec;
  k19 = 20 per_sec;
  k20 = 0.0012 per_nanmol_per_sec;
  k21 = 0.4842 per_sec;
  k22 = 1.8 per_sec;
  k23 = 0.0066 per_nanmol_per_sec;
  k24 = 0.0066 per_sec;
  k25 = 1 per_sec;
  k26 = 0.3 per_sec;

  // Reactions:
  R1: $A + B -> A_B; k1*A*B - k2*A_B;
  R2: A_B => BpT; k3*A_B;
  R3: BpT => B; k4*BpT;
  R4: BpT + C -> BpT_C; k5*BpT*C - k6*BpT_C;
  R5: BpT_C => B + C; k7*BpT_C;
  R6: CpS => C; k8*CpS;
  R7: D + BpT -> D_BpT; k9*D*BpT - k10*D_BpT;
  R8: D_BpT => DpT_BpT; k11*D_BpT;
  R9: DpT_BpT -> DpT + BpT; k12*DpT_BpT - k13*DpT*BpT;
  R10: DpT + C -> DpT_C; k14*DpT*C - k15*DpT_C;
  R11: DpT_C => D + C; k16*DpT_C;
  R12: DpT + E -> DpT_E; k17*DpT*E - k18*DpT_E;
  R13: DpT_E => D + E; k19*DpT_E;
  R14: DpS + F -> DpS_F; k20*DpS*F - k21*DpS_F;
  R15: DpS_F => D + F; k22*DpS_F;
  R16: DpT + G -> DpT_G; k23*DpT*G - k24*DpT_G;
  R17: DpT_G => DpT + Gp; k25*DpT_G;
  R18: Gp => G; k26*Gp;

  // Unit definitions:
  unit nanmol = 1e-9 mole;
  unit per_sec = 1 / second;
  unit per_nanmol_per_sec = 1 / (1e9 mole * second);
end
